//**Capacitors_SPU122:


object capacitor {
	 parent 393-72996;
	 name Cap_393-72996;
	 phases ABCN;
	 phases_connected ABCN;
	 control MANUAL;
	voltage_set_high  8366;
	voltage_set_low   7569;
	 capacitor_A 0.300000 MVAr;
	 capacitor_B 0.300000 MVAr;
	 capacitor_C 0.300000 MVAr;
	 switchA CLOSED;
	 switchB CLOSED;
	 switchC CLOSED;
	 control_level INDIVIDUAL;
	 nominal_voltage 7970.00;
}


//**End Capacitors_SPU122**
