//**Fuses_SPU125:


object fuse {
	 name FUSEs_402-619382;
	 phases "BN";
	 from 500-933240;
	 to Fuse_402-619382;
	 current_limit 1000 A;
	 mean_replacement_time 360 ;
	 phase_A_status GOOD;
	 phase_B_status GOOD;
	 phase_C_status GOOD;
	 repair_dist_type NONE;
}


//**End Fuses_SPU125**
