//**Regulators_SPU125:


object regulator_configuration {
	 name Reg_Config_50;
	 connect_type 1;
	 band_center 123;
	 band_width 2;
	 time_delay 30.0;
	 raise_taps 16;
	 lower_taps 16;
	  current_transducer_ratio 400;
	  power_transducer_ratio 6.350000e+01;
	  compensator_r_setting_A 2;
	  compensator_r_setting_B 2;
	  compensator_r_setting_C 2;
	  compensator_x_setting_A 9;
	  compensator_x_setting_B 9;
	  compensator_x_setting_C 9;
	  CT_phase "ABC";
	  PT_phase "ABC";
	 regulation 0.10;
	 Control LINE_DROP_COMP;
	 control_level INDIVIDUAL;
	 Type B;
	 tap_pos_A 0;
	 tap_pos_B 0;
	 tap_pos_C 0;
}


object regulator {
	 name Regulator_416-32980;
	 phases ABCN;
	 from Breaker_416-32980;
	 to Reg_SPU125;
	 configuration Reg_Config_50;
}


//**End Regulator_SPU125**
