//**Transformers_SPU125:


object transformer_configuration {
	 name Xfmr_Config_113;
	 connect_type WYE_WYE;
	 install_type PADMOUNT;
	 primary_voltage 7.621024e+03;
	 secondary_voltage 2.401777e+03;
	 power_rating 10000;
	 impedance 8.000000e-05+7.400000e-04j;
	 no_load_loss 8.000000e-01;
}


object transformer  {
	 name Trafo_409-401941;
	 phases ABCN;
	 from 500-933236;
	 to Xfmr_409-401941;
	 configuration Xfmr_Config_113;
}


//**End Transformers_SPU125**
