//**Breakers_TUR111:


object recloser {
	 name recloser_Breaker Recloser;
	 phases "ABCN";
	 from 403-474406;
	 to Breaker_392-91895;
	 retry_time 1s;
	 max_number_of_tries 3;
}


object recloser {
	 name recloser_392-93176;
	 phases "ABCN";
	 from TUR111;
	 to Breaker_416-69802;
	 retry_time 1s;
	 max_number_of_tries 3;
}
