//**Large_customers_TUR117:


object load {
	 parent 406-325817;
	 name Large_customer_389-1197724-0;
	 phases AN;
	 base_power_A 71916.666667;
	 power_pf_A 1.000000;
	 current_pf_A 1.000000;
	 impedance_pf_A 1.000000;
	 power_fraction_A 0.50;
	 current_fraction_A 0.10;
	 impedance_fraction_A 0.40;
	 nominal_voltage 7970.00;
}


//**End Loads_TUR117**
