//**Fuses_TVW131:


object fuse {
	 name FUSEs_402-1369238;
	 phases "ABCN";
	 from 416-52180;
	 to Fuse_402-1369238;
	 current_limit 1000 A;
	 mean_replacement_time 360 ;
	 phase_A_status GOOD;
	 phase_B_status GOOD;
	 phase_C_status GOOD;
	 repair_dist_type NONE;
}


//**End Fuses_TVW131**
