//**Regulators_TVW131:


object regulator_configuration {
	 name Reg_Config_50;
	 connect_type 1;
	 band_center 123;
	 band_width 2;
	 time_delay 30.0;
	 raise_taps 16;
	 lower_taps 16;
	  current_transducer_ratio 400;
	  power_transducer_ratio 6.350000e+01;
	  compensator_r_setting_A 1.400000e+00;
	  compensator_r_setting_B 1.400000e+00;
	  compensator_r_setting_C 1.400000e+00;
	  compensator_x_setting_A 4.600000e+00;
	  compensator_x_setting_B 4.600000e+00;
	  compensator_x_setting_C 4.600000e+00;
	  CT_phase "ABC";
	  PT_phase "ABC";
	 regulation 0.10;
	 Control LINE_DROP_COMP;
	 control_level INDIVIDUAL;
	 Type B;
	 tap_pos_A 0;
	 tap_pos_B 0;
	 tap_pos_C 0;
}


object regulator {
	 name Regulator_416-52180;
	 phases ABCN;
	 from Breaker_416-52180;
	 to Reg_TVW131;
	 configuration Reg_Config_50;
}


//**End Regulator_TVW131**
